x := transpose([1, 2, 3, 4, 5, 6, 7, 8, 9, 10, 11, 12, 13, 14, 15, 16, 17, 18, 19, 20])
y := transpose([-0.10, -0.21, 0.01, 0.05, -0.13, -0.23, -0.21, -0.43, -0.57, -0.44, -0.44, -0.83, -0.78, -0.81, -1.06, -1.41, -1.40, -1.70, -1.96, -1.91])
s := cspline(x, y)
A(t) := interp(s, x, y, t)
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A(8.5) = -0.533184
A(6) = -0.23
A(1) = -0.1
A(3.5) = 0.0657148
A(9) = -0.57
A(6.5) = -0.207706
A(4) = 0.05
A(1.5) = -0.234345
A(9.5) = -0.523738
A(7) = -0.21
A(4.5) = -0.0297044
A(2) = -0.21
A(7.5) = -0.299778
A(10) = -0.44
A(5) = -0.13
A(2.5) = -0.103155
A(8) = -0.43
A(5.5) = -0.204397
A(3) = 0.01
