x := transpose([1, 2, 3, 4, 5, 6, 7, 8, 9, 10, 11, 12, 13, 14, 15, 16, 17, 18, 19, 20])
y := transpose([-0.02, 0.44, 0.51, 0.67, 0.69, 1.04, 1.1, 1.3, 1.7, 2.0, 2.1, 2.4, 2.90, 3.50, 3.99, 4.06, 4.54, 4.99, 5.36, 5.99])
F(x) := [1; x; x^2]
C := linfit(x, y, F)
C = [0.0819123; 0.0805441; 0.0106995]
f(x) := C[0] + C[1]*x + C[2]*x^2
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f(8.5) = 1.53957
f(6) = 0.950358
f(1) = 0.173156
f(3.5) = 0.494885
f(9) = 1.67347
f(6.5) = 1.0575
f(4) = 0.57528
f(1.5) = 0.226802
f(9.5) = 1.81271
f(7) = 1.17
f(4.5) = 0.661025
f(2) = 0.285798
f(7.5) = 1.28784
f(10) = 1.9573
f(5) = 0.75212
f(2.5) = 0.350144
f(8) = 1.41103
f(5.5) = 0.848564
f(3) = 0.41984
