y0 := [-0.6; 2]
D(t, y) := [t*cos(y[0] + y[1]); sin(y[0] - y[1])]
u := rkfixed(y0, 2, 5, 40, D)
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u = [
    2, -0.6, 2;
    2.075, -0.572999, 1.95923;
    2.15, -0.542769, 1.91407;
    2.225, -0.508977, 1.8643;
    2.3, -0.471306, 1.80981;
    2.375, -0.429465, 1.75061;
    2.45, -0.383222, 1.6869;
    2.525, -0.332431, 1.61911;
    2.6, -0.277068, 1.54792;
    2.675, -0.217271, 1.47429
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]
u = [
    2, -0.6, 2;
    2.075, -0.572999, 1.95923;
    2.15, -0.542769, 1.91407;
    2.225, -0.508977, 1.8643;
    2.3, -0.471306, 1.80981;
    2.375, -0.429465, 1.75061;
    2.45, -0.383222, 1.6869;
    2.525, -0.332431, 1.61911;
    2.6, -0.277068, 1.54792;
    2.675, -0.217271, 1.47429
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]
